// J1
Export monitor	constI_seg1_in
Export monitor	constI_seg1_out
Export monitor	constI_seg2_in
Export monitor	constI_seg2_out
Export monitor	constI_seg3_in
Export monitor	constI_seg3_out
Export monitor	constI_seg4_in
Export monitor	constI_seg4_out
Export monitor	constI_seg5_in
Export monitor	constI_seg5_out
Export monitor	constI_seg6_in
Export monitor	constI_seg6_out
Export monitor	constI_seg7_in
Export monitor	constI_seg7_out
Export monitor	constI_seg8_in
Export monitor	constI_seg8_out
Export monitor	constI_seg9_in
Export monitor	constI_seg9_out
Export monitor	constI_seg10_in
Export monitor	constI_seg10_out
Export monitor	constI_seg11_in
Export monitor	constI_seg11_out
Export monitor	constI_seg12_in
Export monitor	constI_seg12_out
Export monitor	constI_seg13_in
Export monitor	constI_seg13_out
Export monitor	constI_seg14_in
Export monitor	constI_seg14_out
Export monitor	constI_seg15_in
Export monitor	constI_seg15_out
Export monitor	constI_seg16_in
Export monitor	constI_seg16_out
Export monitor	constI_seg17_in
Export monitor	constI_seg17_out
Export monitor	constI_seg18_in
Export monitor	constI_seg18_out
Export monitor	constI_seg19_in
Export monitor	constI_seg19_out
Export monitor	constI_seg20_in
Export monitor	constI_seg20_out
Export monitor	constI_seg21_in
Export monitor	constI_seg21_out
Export monitor	constI_seg22_in
Export monitor	constI_seg22_out
Export monitor	constI_seg23_in
Export monitor	constI_seg23_out

Export monitor	constI_RegSub
Export monitor	constI_Reg5
Export monitor	constI_Reg7
Export monitor	constI_Reg8
Export monitor	constI_Reg3
Export monitor	constI_Reg6
Export monitor	constI_Reg1
Export monitor	constI_Reg2
Export monitor	constI_Reg4

Export monitor	constI_Cap3
Export monitor	constI_Cap4
Export monitor	constI_Cap5
Export monitor	constI_Cap1
Export monitor	constI_Cap2
