// J1
Export monitor	full_seg1_in
Export monitor	full_seg1_out
Export monitor	full_seg2_in
Export monitor	full_seg2_out
Export monitor	full_seg3_in
Export monitor	full_seg3_out
Export monitor	full_seg4_in
Export monitor	full_seg4_out
Export monitor	full_seg5_in
Export monitor	full_seg5_out
Export monitor	full_seg6_in
Export monitor	full_seg6_out
Export monitor	full_seg7_in
Export monitor	full_seg7_out
Export monitor	full_seg8_in
Export monitor	full_seg8_out
Export monitor	full_seg9_in
Export monitor	full_seg9_out
Export monitor	full_seg10_in
Export monitor	full_seg10_out
Export monitor	full_seg11_in
Export monitor	full_seg11_out
Export monitor	full_seg12_in
Export monitor	full_seg12_out
Export monitor	full_seg13_in
Export monitor	full_seg13_out
Export monitor	full_seg14_in
Export monitor	full_seg14_out
Export monitor	full_seg15_in
Export monitor	full_seg15_out
Export monitor	full_seg16_in
Export monitor	full_seg16_out
Export monitor	full_seg17_in
Export monitor	full_seg17_out
Export monitor	full_seg18_in
Export monitor	full_seg18_out
Export monitor	full_seg19_in
Export monitor	full_seg19_out
Export monitor	full_seg20_in
Export monitor	full_seg20_out
Export monitor	full_seg21_in
Export monitor	full_seg21_out
Export monitor	full_seg22_in
Export monitor	full_seg22_out
Export monitor	full_seg23_in
Export monitor	full_seg23_out

//Export monitor	Full_RegSub
//Export monitor	Full_Reg5
//Export monitor	Full_Reg7
//Export monitor	Full_Reg8
//Export monitor	Full_Reg3
//Export monitor	Full_Reg6
//Export monitor	Full_Reg1
//Export monitor	Full_Reg2
//Export monitor	Full_Reg4

//Export monitor	Full_Cap3
//Export monitor	Full_Cap4
//Export monitor	Full_Cap5
//Export monitor	Full_Cap1
//Export monitor	Full_Cap2
