// J1
Export monitor	simp_seg1_in
Export monitor	simp_seg1_out
Export monitor	simp_seg2_in
Export monitor	simp_seg2_out
Export monitor	simp_seg3_in
Export monitor	simp_seg3_out
Export monitor	simp_seg4_in
Export monitor	simp_seg4_out
Export monitor	simp_seg5_in
Export monitor	simp_seg5_out
Export monitor	simp_seg6_in
Export monitor	simp_seg6_out
Export monitor	simp_seg7_in
Export monitor	simp_seg7_out
Export monitor	simp_seg8_in
Export monitor	simp_seg8_out
Export monitor	simp_seg9_in
Export monitor	simp_seg9_out
Export monitor	simp_seg10_in
Export monitor	simp_seg10_out
Export monitor	simp_seg11_in
Export monitor	simp_seg11_out
Export monitor	simp_seg12_in
Export monitor	simp_seg12_out
Export monitor	simp_seg13_in
Export monitor	simp_seg13_out
Export monitor	simp_seg14_in
Export monitor	simp_seg14_out
Export monitor	simp_seg15_in
Export monitor	simp_seg15_out
Export monitor	simp_seg16_in
Export monitor	simp_seg16_out
Export monitor	simp_seg17_in
Export monitor	simp_seg17_out
Export monitor	simp_seg18_in
Export monitor	simp_seg18_out
Export monitor	simp_seg19_in
Export monitor	simp_seg19_out
Export monitor	simp_seg20_in
Export monitor	simp_seg20_out
Export monitor	simp_seg21_in
Export monitor	simp_seg21_out
Export monitor	simp_seg22_in
Export monitor	simp_seg22_out
Export monitor	simp_seg23_in
Export monitor	simp_seg23_out

//Export monitor	Simp_RegSub
//Export monitor	Simp_Reg5
//Export monitor	Simp_Reg7
//Export monitor	Simp_Reg8
//Export monitor	Simp_Reg3
//Export monitor	Simp_Reg6
//Export monitor	Simp_Reg1
//Export monitor	Simp_Reg2
//Export monitor	Simp_Reg4

//Export monitor	Simp_Cap3
//Export monitor	Simp_Cap4
//Export monitor	Simp_Cap5
//Export monitor	Simp_Cap1
//Export monitor	Simp_Cap2
